*Heading
** Job name: Column_ECB_Model Model name: Column_ECB_Model
** Generated by: Abaqus/CAE 6.14-1
*Preprint, echo=NO, model=NO, history=NO, contact=NO
**
** PARTS
**
*Part, name=Part-2
****Node
***      1,         -9.5,          10.,           0.
***      2,         -7.5,          10.,           0.
****Element, type=B31
***1, 1, 2
****Nset, nset=Set-2
*** 1, 2
****Elset, elset=Set-2
*** 1,
****Nset, nset=Set-3
*** 1, 2
****Elset, elset=Set-3
*** 1,
****Nset, nset=Set-4
*** 1, 2
****Elset, elset=Set-4
*** 1,
****Nset, nset=Set-5
*** 1, 2
****Elset, elset=Set-5
*** 1,
****Nset, nset=Set-6
*** 1, 2
****Elset, elset=Set-6
*** 1,
***** Section: Section-5  Profile: Profile-1
****Beam Section, elset=Set-5, material=Material-1, poisson = 0.3, temperature=GRADIENTS, section=CIRC
***10.
***0.,0.,-1.
***
***
*NODE,NSET=PR
1, -9.5,          10.,           0.
2, -7.5,          10.,           0.
*USER ELEMENT,NODES=2,TYPE=U1001,PROPERTIES=7,COORDINATES=3,VARIABLES=10
1,2,3,4
*ELEMENT,TYPE=U1001,ELSET=UTRUSS
1, 1, 2
*UEL PROPERTY,ELSET=UTRUSS
2911000000,3868000000,0.00861,0.01891,0.8,0.05,925580000
*Nset, nset=Set-2
 1, 2
*Elset, elset=Set-2
 1,
*End Part
**
*Part, name=wf
*Node
      1,  -397.399994,         368.,        3100.
      2,  -397.399994,         368.,           0.
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*Element, type=S4R
  1,   1,  13, 277,  96
  2,  13,  14, 278, 277
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*Nset, nset=Set-1
   1,   2,   7,   8,  13,  14
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*Elset, elset=Set-1, generate
 493,  697,    1
*Nset, nset=Set-2
   1,   2,   3,   4,   5,   6
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*Elset, elset=Set-2, generate
   1,  492,    1
** Section: Section-3
*Shell Section, elset=Set-2, material=Material-2
67.6, 5
** Section: Section-2
*Shell Section, elset=Set-1, material=Material-2
42., 5
*End Part
**
**
** ASSEMBLY
**
*Assembly, name=Assembly
**
*Instance, name=Part-2-1, part=Part-2
        14.5,       -9.375,          10.
*End Instance
**
*Instance, name=wf-1, part=wf
        373., 0.624999999999978,        213.7
        373., 0.624999999999978,        213.7, 373.577350279552, 0.0476497204479356, 214.277350279552, 119.999999109416
*End Instance
**
*Node
      1,           5.,        0.625,          10.
*Node
      2,           5.,    -3099.375,          10.
*Nset, nset=Set-7, instance=Part-2-1
 2,
*Nset, nset=Set-8
 1,
*Nset, nset=Set-9
 2,
*Nset, nset=m_Set-1
 1,
*Nset, nset=m_Set-3
 2,
*Nset, nset=m_Set-5
 1,
*Nset, nset=s_Set-1, instance=wf-1
   2,   3,   6,   8,   9,  12
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*Elset, elset=s_Set-1, instance=wf-1
  41,  82, 123, 124, 165, 206
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*Nset, nset=s_Set-3, instance=wf-1
   1,   4,   5,   7,  10,  11
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*Elset, elset=s_Set-3, instance=wf-1
   1,  42,  83, 164, 205, 246
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*Nset, nset=s_Set-5, instance=Part-2-1
 1,
*Surface, type=NODE, name=s_Set-1_CNS_, internal
s_Set-1, 1.
*Surface, type=NODE, name=s_Set-3_CNS_, internal
s_Set-3, 1.
*Surface, type=NODE, name=s_Set-5_CNS_, internal
s_Set-5, 1.
** Constraint: Constraint-1
*MPC
BEAM, s_Set-1, m_Set-1
** Constraint: Constraint-2
*MPC
BEAM, s_Set-3, m_Set-3
** Constraint: Constraint-3
*MPC
BEAM, s_Set-5, m_Set-5
*End Assembly
*Amplitude, name=Amp-1
             0.,              0.,              1.,         0.00375,              2.,              0.,              3.,        -0.00375
             4.,              0.,              5.,         0.00375,              6.,              0.,              7.,        -0.00375
             8.,              0.,              9.,           0.005,             10.,              0.,             11.,          -0.005
            12.,              0.,             13.,           0.005,             14.,              0.,             15.,          -0.005
            16.,              0.,             17.,          0.0075,             18.,              0.,             19.,         -0.0075
            20.,              0.,             21.,          0.0075,             22.,              0.,             23.,         -0.0075
            24.,              0.,             25.,            0.01,             26.,              0.,             27.,           -0.01
            28.,              0.,             29.,            0.01,             30.,              0.,             31.,           -0.01
            32.,              0.,             33.,           0.015,             34.,              0.,             35.,          -0.015
            36.,              0.,             37.,           0.015,             38.,              0.,             39.,          -0.015
            40.,              0.,             41.,            0.02,             42.,              0.,             43.,           -0.02
            44.,              0.,             45.,            0.02,             46.,              0.,             47.,           -0.02
            48.,              0.,             49.,            0.0305,             50.,              0.,             51.,           -0.0308
            52.,              0.,             53.,            0.031,             54.,              0.,             55.,           -0.03
            56.,              0.,             57.,            0.04,             58.,              0.,             59.,           -0.0404
            60.,              0.,             61.,            0.04,             62.,              0.,             63.,           -0.042
            64.,              0.,             65.,            0.0512,             66.,              0.,             67.,           -0.0515
            68.,              0.,             69.,            0.0503,             70.,              0.,             71.,          -0.0507
            72.,              0.,             73.,            0.0646,             74.,              0.,
**
** MATERIALS
**
*Material, name=Material-1
*Elastic
 2.05001e+08, 0.3
*Material, name=Material-2
*Elastic
205000., 0.3
** ----------------------------------------------------------------
**
** STEP: Step-1
**
*Step, name=Step-1, nlgeom=YES, inc=1000000
*Static
0.01, 74., 1e-15, 0.01
**
** BOUNDARY CONDITIONS
**
** Name: BC-1 Type: Displacement/Rotation
*Boundary
Set-7, 1, 1
Set-7, 2, 2
Set-7, 3, 3
Set-7, 4, 4
Set-7, 5, 5
Set-7, 6, 6
** Name: BC-3 Type: Displacement/Rotation
*Boundary
Set-8, 1, 1
Set-8, 2, 2
Set-8, 3, 3
Set-8, 5, 5
Set-8, 6, 6
** Name: BC-4 Type: Displacement/Rotation
*Boundary, amplitude=Amp-1
Set-9, 1, 1
Set-9, 3, 3, 3100.
Set-9, 5, 5
Set-9, 6, 6
**
** OUTPUT REQUESTS
**
*Restart, write, frequency=0
**
** FIELD OUTPUT: F-Output-1
**
*Output, field, variable=PRESELECT
**
** HISTORY OUTPUT: H-Output-1
**
*Output, history, variable=PRESELECT
*End Step
